// Motors
object motor {
    name hotel_1_PTAC_Compressor;
    parent GC-12-47-1_meter_3;
    phases ABCN;
    frequency_measure_type PLL;
    base_power 480000;
    nominal_voltage 277;
	flags DELTAMODE;

	H 0.363;       // [s]
	Rs 0.0041472;  // [pu]
    Xs 0.078336;  //  [pu]
    Xm 3.350016;  // [pu]
    Rr 0.00466176;  // [pu]
    Xr 0.0768;  // [pu]

	thermalProtectionTrip "0.55 0.6 0.65 0.7 0.75 0.8;0.5 1.0 2.0 4.0 8.0 10.0";

	emsProtectionTrip "0.0 0.4 0.5 0.6 0.7;0.083 0.1 0.166 0.25 0.5";
	emsProtectionReconnect "0.95;2.0";

	object recorder {
		property "ws, rotor_speed, Vas.real, Vas.imag, Vbs.real, Vbs.imag, Vcs.real, Vcs.imag, mechanical_torque, electrical_torque, electrical_power.real, electrical_power.imag, phips.real, phips.imag, phipr.real, phipr.imag, Ips.real, Ips.imag, Ipr.real, Ipr.imag";
		interval 0;
		file output/hotel_1_PTAC_Compressor.csv;
		flags DELTAMODE;
	};
}

object motor {
    name hotel_1_PTAC_Fan_A;
    parent GC-12-47-1_meter_3;
    phases AN;
    frequency_measure_type PLL;
    base_power 35000;
    nominal_voltage 277;
	flags DELTAMODE;

	thermalProtectionTrip "0.55 0.6 0.65 0.7 0.75 0.8;0.5 1.0 2.0 4.0 8.0 10.0";

	object recorder {
		property "ws, rotor_speed, Vs.real, Vs.imag, mechanical_torque, electrical_torque, electrical_power.real, electrical_power.imag, Ids.real, Ids.imag, Iqs.real, Iqs.imag, psi_dr.real, psi_dr.imag, psi_qr.real, psi_qr.imag";
		interval 0;
		file output/hotel_1_PTAC_Fan_A.csv;
		flags DELTAMODE;
	};
}

object motor {
    name hotel_1_PTAC_Fan_B;
    parent GC-12-47-1_meter_3;
    phases BN;
    frequency_measure_type PLL;
    base_power 35000;
    nominal_voltage 277;
	flags DELTAMODE;

	thermalProtectionTrip "0.55 0.6 0.65 0.7 0.75 0.8;0.5 1.0 2.0 4.0 8.0 10.0";

	object recorder {
		property "ws, rotor_speed, Vs.real, Vs.imag, mechanical_torque, electrical_torque, electrical_power.real, electrical_power.imag, Ids.real, Ids.imag, Iqs.real, Iqs.imag, psi_dr.real, psi_dr.imag, psi_qr.real, psi_qr.imag";
		interval 0;
		file output/hotel_1_PTAC_Fan_B.csv;
		flags DELTAMODE;
	};
}

object motor {
    name hotel_1_PTAC_Fan_C;
    parent GC-12-47-1_meter_3;
    phases CN;
    frequency_measure_type PLL;
    base_power 35000;
    nominal_voltage 277;
	flags DELTAMODE;

	thermalProtectionTrip "0.55 0.6 0.65 0.7 0.75 0.8;0.5 1.0 2.0 4.0 8.0 10.0";

	object recorder {
		property "ws, rotor_speed, Vs.real, Vs.imag, mechanical_torque, electrical_torque, electrical_power.real, electrical_power.imag, Ids.real, Ids.imag, Iqs.real, Iqs.imag, psi_dr.real, psi_dr.imag, psi_qr.real, psi_qr.imag";
		interval 0;
		file output/hotel_1_PTAC_Fan_C.csv;
		flags DELTAMODE;
	};
}

object motor {
    name hotel_1_Exhaust_Fan_A;
    parent GC-12-47-1_meter_3;
    phases AN;
    frequency_measure_type PLL;
    base_power 10000;
    nominal_voltage 277;
	flags DELTAMODE;

	thermalProtectionTrip "0.55 0.6 0.65 0.7 0.75 0.8;0.5 1.0 2.0 4.0 8.0 10.0";

	object recorder {
		property "ws, rotor_speed, Vs.real, Vs.imag, mechanical_torque, electrical_torque, electrical_power.real, electrical_power.imag, Ids.real, Ids.imag, Iqs.real, Iqs.imag, psi_dr.real, psi_dr.imag, psi_qr.real, psi_qr.imag";
		interval 0;
		file output/hotel_1_Exhaust_Fan_A.csv;
		flags DELTAMODE;
	};
}

object motor {
    name hotel_1_Exhaust_Fan_B;
    parent GC-12-47-1_meter_3;
    phases BN;
    frequency_measure_type PLL;
    base_power 35000;
    nominal_voltage 277;
	flags DELTAMODE;

	thermalProtectionTrip "0.55 0.6 0.65 0.7 0.75 0.8;0.5 1.0 2.0 4.0 8.0 10.0";

	object recorder {
		property "ws, rotor_speed, Vs.real, Vs.imag, mechanical_torque, electrical_torque, electrical_power.real, electrical_power.imag, Ids.real, Ids.imag, Iqs.real, Iqs.imag, psi_dr.real, psi_dr.imag, psi_qr.real, psi_qr.imag";
		interval 0;
		file output/hotel_1_Exhaust_Fan_B.csv;
		flags DELTAMODE;
	};
}

object motor {
    name hotel_1_Exhaust_Fan_C;
    parent GC-12-47-1_meter_3;
    phases CN;
    frequency_measure_type PLL;
    base_power 35000;
    nominal_voltage 277;
	flags DELTAMODE;

	thermalProtectionTrip "0.55 0.6 0.65 0.7 0.75 0.8;0.5 1.0 2.0 4.0 8.0 10.0";

	object recorder {
		property "ws, rotor_speed, Vs.real, Vs.imag, mechanical_torque, electrical_torque, electrical_power.real, electrical_power.imag, Ids.real, Ids.imag, Iqs.real, Iqs.imag, psi_dr.real, psi_dr.imag, psi_qr.real, psi_qr.imag";
		interval 0;
		file output/hotel_1_Exhaust_Fan_C.csv;
		flags DELTAMODE;
	};
}

object motor {
    name hotel_1_Split_Fan;
    parent GC-12-47-1_meter_3;
    phases ABCN;
    frequency_measure_type PLL;
    base_power 135000;
    nominal_voltage 277;
	flags DELTAMODE;

	H 0.363;       // [s]
	Rs 0.0041472;  // [pu]
    Xs 0.078336;  //  [pu]
    Xm 3.350016;  // [pu]
    Rr 0.00466176;  // [pu]
    Xr 0.0768;  // [pu]

	overLoadProtectionTrip "0.6 0.7 0.8;0.33 0.5 1.0";

	contactorProtectionTrip "0.65;0.1";
	contactorProtectionReconnect "0.75;0.1";

	object recorder {
		property "ws, rotor_speed, Vas.real, Vas.imag, Vbs.real, Vbs.imag, Vcs.real, Vcs.imag, mechanical_torque, electrical_torque, electrical_power.real, electrical_power.imag, phips.real, phips.imag, phipr.real, phipr.imag, Ips.real, Ips.imag, Ipr.real, Ipr.imag";
		interval 0;
		file output/hotel_1_Split_Fan.csv;
		flags DELTAMODE;
	};
}

object motor {
    name hotel_1_Split_Compressor;
    parent GC-12-47-1_meter_3;
    phases ABCN;
    frequency_measure_type PLL;
    base_power 480000;
    nominal_voltage 277;
	flags DELTAMODE;

	H 0.363;       // [s]
	Rs 0.0041472;  // [pu]
    Xs 0.078336;  //  [pu]
    Xm 3.350016;  // [pu]
    Rr 0.00466176;  // [pu]
    Xr 0.0768;  // [pu]

	overLoadProtectionTrip "0.6 0.7 0.8;0.33 0.5 1.0";

	contactorProtectionTrip "0.65;0.1";
	contactorProtectionReconnect "0.75;0.1";

	object recorder {
		property "ws, rotor_speed, Vas.real, Vas.imag, Vbs.real, Vbs.imag, Vcs.real, Vcs.imag, mechanical_torque, electrical_torque, electrical_power.real, electrical_power.imag, phips.real, phips.imag, phipr.real, phipr.imag, Ips.real, Ips.imag, Ipr.real, Ipr.imag";
		interval 0;
		file output/hotel_1_Split_Compressor.csv;
		flags DELTAMODE;
	};
}

object motor {
    name hotel_1_Splot_Frac_Condensor_A;
    parent GC-12-47-1_meter_3;
    phases AN;
    frequency_measure_type PLL;
    base_power 50000;
    nominal_voltage 277;
	flags DELTAMODE;

	thermalProtectionTrip "0.55 0.6 0.65 0.7 0.75 0.8;0.5 1.0 2.0 4.0 8.0 10.0";

	contactorProtectionTrip "0.65;0.1";
	contactorProtectionReconnect "0.75;0.1";

	object recorder {
		property "ws, rotor_speed, Vs.real, Vs.imag, mechanical_torque, electrical_torque, electrical_power.real, electrical_power.imag, Ids.real, Ids.imag, Iqs.real, Iqs.imag, psi_dr.real, psi_dr.imag, psi_qr.real, psi_qr.imag";
		interval 0;
		file output/hotel_1_Splot_Frac_Condensor_A.csv;
		flags DELTAMODE;
	};
}

object motor {
    name hotel_1_Splot_Frac_Condensor_B;
    parent GC-12-47-1_meter_3;
    phases BN;
    frequency_measure_type PLL;
    base_power 50000;
    nominal_voltage 277;
	flags DELTAMODE;

	thermalProtectionTrip "0.55 0.6 0.65 0.7 0.75 0.8;0.5 1.0 2.0 4.0 8.0 10.0";

	contactorProtectionTrip "0.65;0.1";
	contactorProtectionReconnect "0.75;0.1";

	object recorder {
		property "ws, rotor_speed, Vs.real, Vs.imag, mechanical_torque, electrical_torque, electrical_power.real, electrical_power.imag, Ids.real, Ids.imag, Iqs.real, Iqs.imag, psi_dr.real, psi_dr.imag, psi_qr.real, psi_qr.imag";
		interval 0;
		file output/hotel_1_Splot_Frac_Condensor_B.csv;
		flags DELTAMODE;
	};
}

object motor {
    name hotel_1_Splot_Frac_Condensor_C;
    parent GC-12-47-1_meter_3;
    phases CN;
    frequency_measure_type PLL;
    base_power 50000;
    nominal_voltage 277;
	flags DELTAMODE;

	thermalProtectionTrip "0.55 0.6 0.65 0.7 0.75 0.8;0.5 1.0 2.0 4.0 8.0 10.0";

	contactorProtectionTrip "0.65;0.1";
	contactorProtectionReconnect "0.75;0.1";

	object recorder {
		property "ws, rotor_speed, Vs.real, Vs.imag, mechanical_torque, electrical_torque, electrical_power.real, electrical_power.imag, Ids.real, Ids.imag, Iqs.real, Iqs.imag, psi_dr.real, psi_dr.imag, psi_qr.real, psi_qr.imag";
		interval 0;
		file output/hotel_1_Splot_Frac_Condensor_C.csv;
		flags DELTAMODE;
	};
}

object motor {
    name hotel_1_Splot_Frac_Ind_Draft_A;
    parent GC-12-47-1_meter_3;
    phases AN;
    frequency_measure_type PLL;
    base_power 30000;
    nominal_voltage 277;
	flags DELTAMODE;

	thermalProtectionTrip "0.55 0.6 0.65 0.7 0.75 0.8;0.5 1.0 2.0 4.0 8.0 10.0";

	contactorProtectionTrip "0.65;0.1";
	contactorProtectionReconnect "0.75;0.1";

	object recorder {
		property "ws, rotor_speed, Vs.real, Vs.imag, mechanical_torque, electrical_torque, electrical_power.real, electrical_power.imag, Ids.real, Ids.imag, Iqs.real, Iqs.imag, psi_dr.real, psi_dr.imag, psi_qr.real, psi_qr.imag";
		interval 0;
		file output/hotel_1_Splot_Frac_Ind_Draft_A.csv;
		flags DELTAMODE;
	};
}

object motor {
    name hotel_1_Splot_Frac_Ind_Draft_B;
    parent GC-12-47-1_meter_3;
    phases BN;
    frequency_measure_type PLL;
    base_power 30000;
    nominal_voltage 277;
	flags DELTAMODE;

	thermalProtectionTrip "0.55 0.6 0.65 0.7 0.75 0.8;0.5 1.0 2.0 4.0 8.0 10.0";

	contactorProtectionTrip "0.65;0.1";
	contactorProtectionReconnect "0.75;0.1";

	object recorder {
		property "ws, rotor_speed, Vs.real, Vs.imag, mechanical_torque, electrical_torque, electrical_power.real, electrical_power.imag, Ids.real, Ids.imag, Iqs.real, Iqs.imag, psi_dr.real, psi_dr.imag, psi_qr.real, psi_qr.imag";
		interval 0;
		file output/hotel_1_Splot_Frac_Ind_Draft_B.csv;
		flags DELTAMODE;
	};
}

object motor {
    name hotel_1_Splot_Frac_Ind_Draft_C;
    parent GC-12-47-1_meter_3;
    phases CN;
    frequency_measure_type PLL;
    base_power 30000;
    nominal_voltage 277;
	flags DELTAMODE;

	thermalProtectionTrip "0.55 0.6 0.65 0.7 0.75 0.8;0.5 1.0 2.0 4.0 8.0 10.0";

	contactorProtectionTrip "0.65;0.1";
	contactorProtectionReconnect "0.75;0.1";

	object recorder {
		property "ws, rotor_speed, Vs.real, Vs.imag, mechanical_torque, electrical_torque, electrical_power.real, electrical_power.imag, Ids.real, Ids.imag, Iqs.real, Iqs.imag, psi_dr.real, psi_dr.imag, psi_qr.real, psi_qr.imag";
		interval 0;
		file output/hotel_1_Splot_Frac_Ind_Draft_C.csv;
		flags DELTAMODE;
	};
}
