// Motors
object motor {
    name large_office_1_AHU;
    parent GC-12-47-1_meter_1;
    phases ABCN;
    frequency_measure_type PLL;
    base_power 273000;
    nominal_voltage 277;
	// base_power 3000.0;                       // [W]
	H 0.363;                                    // [s]
	Rs 0.0041472;  // [pu]
    Xs 0.078336;  //  [pu]
    Xm 3.350016;  // [pu]
    Rr 0.00466176;  // [pu]
    Xr 0.0768;  // [pu]

	groupid large_office;

	overLoadProtectionTrip "0.6 0.7 0.8;0.33 0.5 1.0";

	contactorProtectionTrip "0.65;0.1";
	contactorProtectionReconnect "0.75;0.1";

	emsProtectionTrip "0.0 0.4 0.5 0.6 0.7;0.083 0.1 0.166 0.25 0.5";
	emsProtectionReconnect "0.95;2.0";

	 object recorder {
		property "ws, rotor_speed, Vas.real, Vas.imag, Vbs.real, Vbs.imag, Vcs.real, Vcs.imag, mechanical_torque, electrical_torque, electrical_power.real, electrical_power.imag, phips.real, phips.imag, phipr.real, phipr.imag, Ips.real, Ips.imag, Ipr.real, Ipr.imag";
		interval 0;
		file output/output/large_office_1_AHU.csv;
		flags DELTAMODE;
	};
}

object motor {
    name large_office_1_VAV_A;
    parent GC-12-47-1_meter_1;
    phases AN;
    frequency_measure_type PLL;
    base_power 14000;
    nominal_voltage 277;
	flags DELTAMODE;

	groupid large_office;

	thermalProtectionTrip "0.55 0.6 0.65 0.7 0.75 0.8;0.5 1.0 2.0 4.0 8.0 10.0";

	contactorProtectionTrip "0.65;0.1";
	contactorProtectionReconnect "0.75;0.1";

	emsProtectionTrip "0.0 0.4 0.5 0.6 0.7;0.083 0.1 0.166 0.25 0.5";
	emsProtectionReconnect "0.95;2.0";

	object recorder {
		property "ws, rotor_speed, Vs.real, Vs.imag, mechanical_torque, electrical_torque, electrical_power.real, electrical_power.imag, Ids.real, Ids.imag, Iqs.real, Iqs.imag, psi_dr.real, psi_dr.imag, psi_qr.real, psi_qr.imag";
		interval 0;
		file output/large_office_1_VAV_A.csv;
		flags DELTAMODE;
	};
}

object motor {
    name large_office_1_VAV_B;
    parent GC-12-47-1_meter_1;
    phases BN;
    frequency_measure_type PLL;
    base_power 14000;
    nominal_voltage 277;
	flags DELTAMODE;

	groupid large_office;

	thermalProtectionTrip "0.55 0.6 0.65 0.7 0.75 0.8;0.5 1.0 2.0 4.0 8.0 10.0";

	contactorProtectionTrip "0.65;0.1";
	contactorProtectionReconnect "0.75;0.1";

	emsProtectionTrip "0.0 0.4 0.5 0.6 0.7;0.083 0.1 0.166 0.25 0.5";
	emsProtectionReconnect "0.95;2.0";

	object recorder {
		property "ws, rotor_speed, Vs.real, Vs.imag, mechanical_torque, electrical_torque, electrical_power.real, electrical_power.imag, Ids.real, Ids.imag, Iqs.real, Iqs.imag, psi_dr.real, psi_dr.imag, psi_qr.real, psi_qr.imag";
		interval 0;
		file output/large_office_1_VAV_A.csv;
		flags DELTAMODE;
	};
}

object motor {
    name large_office_1_VAV_C;
    parent GC-12-47-1_meter_1;
    phases CN;
    frequency_measure_type PLL;
    base_power 14000;
    nominal_voltage 277;
	flags DELTAMODE;

	groupid large_office;

	thermalProtectionTrip "0.55 0.6 0.65 0.7 0.75 0.8;0.5 1.0 2.0 4.0 8.0 10.0";

	contactorProtectionTrip "0.65;0.1";
	contactorProtectionReconnect "0.75;0.1";

	emsProtectionTrip "0.0 0.4 0.5 0.6 0.7;0.083 0.1 0.166 0.25 0.5";
	emsProtectionReconnect "0.95;2.0";

	object recorder {
		property "ws, rotor_speed, Vs.real, Vs.imag, mechanical_torque, electrical_torque, electrical_power.real, electrical_power.imag, Ids.real, Ids.imag, Iqs.real, Iqs.imag, psi_dr.real, psi_dr.imag, psi_qr.real, psi_qr.imag";
		interval 0;
		file output/large_office_1_VAV_C.csv;
		flags DELTAMODE;
	};
}

object motor {
    name large_office_1_DOAS;
    parent GC-12-47-1_meter_1;
    phases ABCN;
    frequency_measure_type PLL;
    base_power 21000;
    nominal_voltage 277;
	flags DELTAMODE;

	H 0.363;       // [s]
	Rs 0.041472;  // [pu]
    Xs 0.78336;  //  [pu]
    Xm 33.50016;  // [pu]
    Rr 0.0466176;  // [pu]
    Xr 0.768;  // [pu]

	groupid large_office;

	overLoadProtectionTrip "0.6 0.7 0.8;0.33 0.5 1.0";

	contactorProtectionTrip "0.65;0.1";
	contactorProtectionReconnect "0.75;0.1";

	emsProtectionTrip "0.0 0.4 0.5 0.6 0.7;0.083 0.1 0.166 0.25 0.5";
	emsProtectionReconnect "0.95;2.0";

	object recorder {
		property "ws, rotor_speed, Vas.real, Vas.imag, Vbs.real, Vbs.imag, Vcs.real, Vcs.imag, mechanical_torque, electrical_torque, electrical_power.real, electrical_power.imag, phips.real, phips.imag, phipr.real, phipr.imag, Ips.real, Ips.imag, Ipr.real, Ipr.imag";
		interval 0;
		file output/large_office_1_DOAS.csv;
		flags DELTAMODE;
	};
}

object motor {
    name large_office_1_Chiller_compressor;
    parent GC-12-47-1_meter_1;
    phases ABCN;
    frequency_measure_type PLL;
    base_power 798000;
    nominal_voltage 277;
	flags DELTAMODE;

	groupid large_office;

	H 0.363;       // [s]
	Rs 0.0041472;  // [pu]
    Xs 0.078336;  //  [pu]
    Xm 3.350016;  // [pu]
    Rr 0.00466176;  // [pu]
    Xr 0.0768;  // [pu]

	relayProtectionTrip "0.6;0.08";
	relayProtectionReconnect "0.9;0.033";

	contactorProtectionTrip "0.65;0.1";
	contactorProtectionReconnect "0.75;0.1";

	emsProtectionTrip "0.0 0.4 0.5 0.6 0.7;0.083 0.1 0.166 0.25 0.5";
	emsProtectionReconnect "0.95;2.0";

	object recorder {
		property "ws, rotor_speed, Vas.real, Vas.imag, Vbs.real, Vbs.imag, Vcs.real, Vcs.imag, mechanical_torque, electrical_torque, electrical_power.real, electrical_power.imag, phips.real, phips.imag, phipr.real, phipr.imag, Ips.real, Ips.imag, Ipr.real, Ipr.imag";
		interval 0;
		file output/large_office_1_Chiller_compressor.csv;
		flags DELTAMODE;
	};
}

object motor {
    name large_office_1_Chiller_pump;
    parent GC-12-47-1_meter_1;
    phases ABCN;
    frequency_measure_type PLL;
    base_power 231000;
    nominal_voltage 277;
	flags DELTAMODE;

	groupid large_office;

	H 0.363;       // [s]
	Rs 0.0041472;  // [pu]
    Xs 0.078336;  //  [pu]
    Xm 3.350016;  // [pu]
    Rr 0.00466176;  // [pu]
    Xr 0.0768;  // [pu]

	contactorProtectionTrip "0.65;0.1";
	contactorProtectionReconnect "0.75;0.1";

	emsProtectionTrip "0.0 0.4 0.5 0.6 0.7;0.083 0.1 0.166 0.25 0.5";
	emsProtectionReconnect "0.95;2.0";

	object recorder {
		property "ws, rotor_speed, Vas.real, Vas.imag, Vbs.real, Vbs.imag, Vcs.real, Vcs.imag, mechanical_torque, electrical_torque, electrical_power.real, electrical_power.imag, phips.real, phips.imag, phipr.real, phipr.imag, Ips.real, Ips.imag, Ipr.real, Ipr.imag";
		interval 0;
		file output/large_office_1_Chiller_pump.csv;
		flags DELTAMODE;
	};
}

object motor {
    name large_office_1_Cool_Tower;
    parent GC-12-47-1_meter_1;
    phases ABCN;
    frequency_measure_type PLL;
    base_power 105000;
    nominal_voltage 277;
	flags DELTAMODE;

	groupid large_office;

	H 0.363;       // [s]
	Rs 0.0041472;  // [pu]
    Xs 0.078336;  //  [pu]
    Xm 3.350016;  // [pu]
    Rr 0.00466176;  // [pu]
    Xr 0.0768;  // [pu]

	overLoadProtectionTrip "0.6 0.7 0.8;0.33 0.5 1.0";

	contactorProtectionTrip "0.65;0.1";
	contactorProtectionReconnect "0.75;0.1";

	emsProtectionTrip "0.0 0.4 0.5 0.6 0.7;0.083 0.1 0.166 0.25 0.5";
	emsProtectionReconnect "0.95;2.0";

	object recorder {
		property "ws, rotor_speed, Vas.real, Vas.imag, Vbs.real, Vbs.imag, Vcs.real, Vcs.imag, mechanical_torque, electrical_torque, electrical_power.real, electrical_power.imag, phips.real, phips.imag, phipr.real, phipr.imag, Ips.real, Ips.imag, Ipr.real, Ipr.imag";
		interval 0;
		file output/large_office_1_Cool_Tower.csv;
		flags DELTAMODE;
	};
}

object motor {
    name large_office_1_Boilers_Ind_Draft;
    parent GC-12-47-1_meter_1;
    phases ABCN;
    frequency_measure_type PLL;
    base_power 189000;
    nominal_voltage 277;
	flags DELTAMODE;

	groupid large_office;

	H 0.363;       // [s]
	Rs 0.0041472;  // [pu]
    Xs 0.078336;  //  [pu]
    Xm 3.350016;  // [pu]
    Rr 0.00466176;  // [pu]
    Xr 0.0768;  // [pu]

	relayProtectionTrip "0.6;0.08";
	relayProtectionReconnect "0.9;0.033";

	contactorProtectionTrip "0.65;0.1";
	contactorProtectionReconnect "0.75;0.1";

	emsProtectionTrip "0.0 0.4 0.5 0.6 0.7;0.083 0.1 0.166 0.25 0.5";
	emsProtectionReconnect "0.95;2.0";

	object recorder {
		property "ws, rotor_speed, Vas.real, Vas.imag, Vbs.real, Vbs.imag, Vcs.real, Vcs.imag, mechanical_torque, electrical_torque, electrical_power.real, electrical_power.imag, phips.real, phips.imag, phipr.real, phipr.imag, Ips.real, Ips.imag, Ipr.real, Ipr.imag";
		interval 0;
		file output/large_office_1_Boilers_Ind_Draft.csv;
		flags DELTAMODE;
	};
}

object motor {
    name large_office_1_Boilers_Pump;
    parent GC-12-47-1_meter_1;
    phases ABCN;
    frequency_measure_type PLL;
    base_power 231000;
    nominal_voltage 277;
	flags DELTAMODE;

	groupid large_office;

	H 0.363;       // [s]
	Rs 0.0041472;  // [pu]
    Xs 0.078336;  //  [pu]
    Xm 3.350016;  // [pu]
    Rr 0.00466176;  // [pu]
    Xr 0.0768;  // [pu]

	overLoadProtectionTrip "0.6 0.7 0.8;0.33 0.5 1.0";

	emsProtectionTrip "0.0 0.4 0.5 0.6 0.7;0.083 0.1 0.166 0.25 0.5";
	emsProtectionReconnect "0.95;2.0";

	object recorder {
		property "ws, rotor_speed, Vas.real, Vas.imag, Vbs.real, Vbs.imag, Vcs.real, Vcs.imag, mechanical_torque, electrical_torque, electrical_power.real, electrical_power.imag, phips.real, phips.imag, phipr.real, phipr.imag, Ips.real, Ips.imag, Ipr.real, Ipr.imag";
		interval 0;
		file output/large_office_1_Boilers_Pump.csv;
		flags DELTAMODE;
	};
}

object motor {
    name large_office_1_CRAC_compressor;
    parent GC-12-47-1_meter_1;
    phases ABCN;
    frequency_measure_type PLL;
    base_power 105000;
    nominal_voltage 277;
	flags DELTAMODE;

	groupid large_office;

	H 0.363;       // [s]
	Rs 0.0041472;  // [pu]
    Xs 0.078336;  //  [pu]
    Xm 3.350016;  // [pu]
    Rr 0.00466176;  // [pu]
    Xr 0.0768;  // [pu]

	relayProtectionTrip "0.6;0.08";
	relayProtectionReconnect "0.9;0.033";

	contactorProtectionTrip "0.65;0.1";
	contactorProtectionReconnect "0.75;0.1";

	emsProtectionTrip "0.0 0.4 0.5 0.6 0.7;0.083 0.1 0.166 0.25 0.5";
	emsProtectionReconnect "0.95;2.0";

	object recorder {
		property "ws, rotor_speed, Vas.real, Vas.imag, Vbs.real, Vbs.imag, Vcs.real, Vcs.imag, mechanical_torque, electrical_torque, electrical_power.real, electrical_power.imag, phips.real, phips.imag, phipr.real, phipr.imag, Ips.real, Ips.imag, Ipr.real, Ipr.imag";
		interval 0;
		file output/large_office_1_CRAC_compressor.csv;
		flags DELTAMODE;
	};
}

object motor {
    name large_office_1_CRAC_Fan;
    parent GC-12-47-1_meter_1;
    phases ABCN;
    frequency_measure_type PLL;
    base_power 21000;
    nominal_voltage 277;
	flags DELTAMODE;

	groupid large_office;

	H 0.363;       // [s]
	Rs 0.041472;  // [pu]
    Xs 0.78336;  //  [pu]
    Xm 33.50016;  // [pu]
    Rr 0.0466176;  // [pu]
    Xr 0.768;  // [pu]

	relayProtectionTrip "0.6;0.08";
	relayProtectionReconnect "0.9;0.033";

	contactorProtectionTrip "0.65;0.1";
	contactorProtectionReconnect "0.75;0.1";

	emsProtectionTrip "0.0 0.4 0.5 0.6 0.7;0.083 0.1 0.166 0.25 0.5";
	emsProtectionReconnect "0.95;2.0";

	object recorder {
		property "ws, rotor_speed, Vas.real, Vas.imag, Vbs.real, Vbs.imag, Vcs.real, Vcs.imag, mechanical_torque, electrical_torque, electrical_power.real, electrical_power.imag, phips.real, phips.imag, phipr.real, phipr.imag, Ips.real, Ips.imag, Ipr.real, Ipr.imag";
		interval 0;
		file output/large_office_1_CRAC_Fan.csv;
		flags DELTAMODE;
	};
}
object motor {
    name large_office_1_CRAC_Frac_Condensor_A;
    parent GC-12-47-1_meter_1;
    phases AN;
    frequency_measure_type PLL;
    base_power 14000;
    nominal_voltage 277;
	flags DELTAMODE;

	groupid large_office;

	thermalProtectionTrip "0.55 0.6 0.65 0.7 0.75 0.8;0.5 1.0 2.0 4.0 8.0 10.0";

	contactorProtectionTrip "0.65;0.1";
	contactorProtectionReconnect "0.75;0.1";

	emsProtectionTrip "0.0 0.4 0.5 0.6 0.7;0.083 0.1 0.166 0.25 0.5";
	emsProtectionReconnect "0.95;2.0";

	object recorder {
		property "ws, rotor_speed, Vs.real, Vs.imag, mechanical_torque, electrical_torque, electrical_power.real, electrical_power.imag, Ids.real, Ids.imag, Iqs.real, Iqs.imag, psi_dr.real, psi_dr.imag, psi_qr.real, psi_qr.imag";
		interval 0;
		file output/large_office_1_CRAC_Frac_Condensor_A.csv;
		flags DELTAMODE;
	};
}

object motor {
    name large_office_1_CRAC_Frac_Condensor_B;
    parent GC-12-47-1_meter_1;
    phases BN;
    frequency_measure_type PLL;
    base_power 14000;
    nominal_voltage 277;
	flags DELTAMODE;

	groupid large_office;

	thermalProtectionTrip "0.55 0.6 0.65 0.7 0.75 0.8;0.5 1.0 2.0 4.0 8.0 10.0";

	contactorProtectionTrip "0.65;0.1";
	contactorProtectionReconnect "0.75;0.1";

	emsProtectionTrip "0.0 0.4 0.5 0.6 0.7;0.083 0.1 0.166 0.25 0.5";
	emsProtectionReconnect "0.95;2.0";

	object recorder {
		property "ws, rotor_speed, Vs.real, Vs.imag, mechanical_torque, electrical_torque, electrical_power.real, electrical_power.imag, Ids.real, Ids.imag, Iqs.real, Iqs.imag, psi_dr.real, psi_dr.imag, psi_qr.real, psi_qr.imag";
		interval 0;
		file output/large_office_1_CRAC_Frac_Condensor_B.csv;
		flags DELTAMODE;
	};
}

object motor {
    name large_office_1_CRAC_Frac_Condensor_C;
    parent GC-12-47-1_meter_1;
    phases CN;
    frequency_measure_type PLL;
    base_power 14000;
    nominal_voltage 277;
	flags DELTAMODE;

	groupid large_office;

	thermalProtectionTrip "0.55 0.6 0.65 0.7 0.75 0.8;0.5 1.0 2.0 4.0 8.0 10.0";

	contactorProtectionTrip "0.65;0.1";
	contactorProtectionReconnect "0.75;0.1";

	emsProtectionTrip "0.0 0.4 0.5 0.6 0.7;0.083 0.1 0.166 0.25 0.5";
	emsProtectionReconnect "0.95;2.0";

	object recorder {
		property "ws, rotor_speed, Vs.real, Vs.imag, mechanical_torque, electrical_torque, electrical_power.real, electrical_power.imag, Ids.real, Ids.imag, Iqs.real, Iqs.imag, psi_dr.real, psi_dr.imag, psi_qr.real, psi_qr.imag";
		interval 0;
		file output/large_office_1_CRAC_Frac_Condensor_C.csv;
		flags DELTAMODE;
	};
}
